Fri Aug  5 23:46:29 CEST 2022
$PROBLEM  translated from babelmixr2
; comments show mu referenced model in ui$getSplitMuModel

$DATA pk.turnover.emax4.csv IGNORE=@

$INPUT ID TIME EVID AMT DV CMT DVID RXROW

$SUBROUTINES ADVAN13 TOL=6

$MODEL NCOMPARTMENTS=4
     COMP(DEPOT, DEFDOSE) ; depot
     COMP(GUT) ; gut
     COMP(CENTER) ; center
     COMP(EFFECT) ; effect

$PK
  MU_1=THETA(3)
  MU_2=THETA(4)
  MU_3=THETA(8)
  MU_4=THETA(9)
  MU_5=THETA(10)
  KTR=DEXP(THETA(1)) ; ktr <- exp(tktr)
  KA=DEXP(THETA(2)) ; ka <- exp(tka)
  CL=DEXP(MU_1+ETA(1)) ; cl <- exp(tcl)
  V=DEXP(MU_2+ETA(2)) ; v <- exp(tv)
  EMAX=1/(1+DEXP(-(THETA(7)))) ; emax <- expit(temax)
  EC50=DEXP(MU_3+ETA(3)) ; ec50 <- exp(tec50)
  KOUT=DEXP(MU_4+ETA(4)) ; kout <- exp(tkout)
  E0=DEXP(MU_5+ETA(5)) ; e0 <- exp(te0)
  A_0(4)=E0 ; effect(0) = e0

$DES
  DCP=A(3)/V ; DCP = center/v
  RXDZ001=(EC50+DCP)
  IF (RXDZ001 .GE. 0.0 .AND. RXDZ001 .LE. 0.000001) THEN
    RXDZ001=0.000001
  END IF
  IF (RXDZ001 .GE. -0.000001 .AND. RXDZ001 .LT. 0.) THEN
    RXDZ001= -0.000001
  END IF
  PD=1-EMAX*DCP/RXDZ001 ; PD = 1 - emax * DCP/(ec50 + DCP)
    ;effect(0) defined in $PK block
  KIN=E0*KOUT ; kin = e0 * kout
  DADT(1) = - KTR*A(1) ; d/dt(depot) = -ktr * depot
  DADT(2) = KTR*A(1)-KA*A(2) ; d/dt(gut) = ktr * depot - ka * gut
  DADT(3) = KA*A(2)-CL/V*A(3) ; d/dt(center) = ka * gut - cl/v * center
  DADT(4) = KIN*PD-KOUT*A(4) ; d/dt(effect) = kin * PD - kout * effect
  CP=A(3)/V ; cp = center/v

$ERROR
  ;Redefine LHS in $DES by prefixing with on RXE_ for $ERROR
  RXE_DCP=A(3)/V ; DCP = center/v
  RXDZE001=(EC50+RXE_DCP)
  IF (RXDZE001 .GE. 0.0 .AND. RXDZE001 .LE. 0.000001) THEN
    RXDZE001=0.000001
  END IF
  IF (RXDZE001 .GE. -0.000001 .AND. RXDZE001 .LT. 0.) THEN
    RXDZE001= -0.000001
  END IF
  RXE_PD=1-EMAX*RXE_DCP/RXDZE001 ; PD = 1 - emax * DCP/(ec50 + DCP)
  RXE_KIN=E0*KOUT ; kin = e0 * kout
  RXE_CP=A(3)/V ; cp = center/v
  RX_PF1=RXE_CP ; rx_pf1 ~ cp
  RX_PF2=A(4) ; rx_pf2 ~ effect
  ; Write out expressions for ipred and w
  RX_IP1 = RX_PF1
  RX_P1 = RX_IP1
  W1=DSQRT((THETA(6))**2+(RX_PF1)**2*(THETA(5))**2) ; W1 ~ sqrt((pkadd.err)^2 + (rx_pred_f_)^2 * (prop.err)^2)
  IF (W1 .EQ. 0.0) W1 = 1
  RX_IP2 = RX_PF2
  RX_P2 = RX_IP2
  W2=DSQRT((THETA(11))**2) ; W2 ~ sqrt((pdadd.err)^2)
  IF (W2 .EQ. 0.0) W2 = 1
  IPRED = RX_IP1
  W     = W1
  IF (DVID .EQ. 2) THEN
    IPRED = RX_IP2
    W     = W2
  END IF
  Y     = IPRED + W*EPS(1)

$THETA (6.2405e-07        ) ;  1 - tktr
       (-3.0064e-06       ) ;  2 - tka
       (-2.004            ) ;  3 - tcl
       (2.0519            ) ;  4 - tv
       (0,         0.09858) ;  5 - prop.err
       (0,         0.51162) ;  6 - pkadd.err
       (6.4185            ) ;  7 - temax
       (0.14076           ) ;  8 - tec50
       (-2.9535           ) ;  9 - tkout
       (4.5704            ) ; 10 - te0
       (0,         3.7171 ) ; 11 - pdadd.err

$OMEGA 0.078585 ; eta.cl
$OMEGA 0.050823 ; eta.v
$OMEGA 0.18427 ; eta.ec50
$OMEGA 0.0083632 ; eta.kout
$OMEGA 0.0027456 ; eta.e0

$SIGMA 1 FIX

$ESTIMATION METHOD=1 INTER MAXEVALS=100000 SIGDIG=3 SIGL=12 PRINT=1 NOABORT

$COVARIANCE

$TABLE ID ETAS(1:LAST) OBJI FIRSTONLY ONEHEADER NOPRINT
    NOAPPEND FILE=pk.turnover.emax4.eta

$TABLE ID TIME IPRED PRED RXROW ONEHEADER NOPRINT
    NOAPPEND FILE=pk.turnover.emax4.pred

NM-TRAN MESSAGES
 WARNINGS AND ERRORS (IF ANY) FOR PROBLEM    1
 (WARNING  2) NM-TRAN INFERS THAT THE DATA ARE POPULATION.

1NONLINEAR MIXED EFFECTS MODEL PROGRAM (NONMEM) VERSION 7.4.3
 ORIGINALLY DEVELOPED BY STUART BEAL, LEWIS SHEINER, AND ALISON BOECKMANN
 CURRENT DEVELOPERS ARE ROBERT BAUER, ICON DEVELOPMENT SOLUTIONS,
 AND ALISON BOECKMANN. IMPLEMENTATION, EFFICIENCY, AND STANDARDIZATION
 PERFORMED BY NOUS INFOSYSTEMS.
 PROBLEM NO.:         1
 translated from babelmixr2
 TOT. NO. OF OBS RECS:      483
 TOT. NO. OF INDIVIDUALS:       32
 GENERAL NONLINEAR KINETICS MODEL WITH STIFF/NONSTIFF EQUATIONS (LSODA, ADVAN13)
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 #TBLN:      1
 #METH: First Order Conditional Estimation with Interaction
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
 #TERM:
0MINIMIZATION SUCCESSFUL
 HOWEVER, PROBLEMS OCCURRED WITH THE MINIMIZATION.
 REGARD THE RESULTS OF THE ESTIMATION STEP CAREFULLY, AND ACCEPT THEM ONLY
 AFTER CHECKING THAT THE COVARIANCE STEP PRODUCES REASONABLE OUTPUT.
 NO. OF FUNCTION EVALUATIONS USED:     2391
 NO. OF SIG. DIGITS IN FINAL EST.:  4.1

 ETABAR IS THE ARITHMETIC MEAN OF THE ETA-ESTIMATES,
 AND THE P-VALUE IS GIVEN FOR THE NULL HYPOTHESIS THAT THE TRUE MEAN IS 0.

 ETABAR:        -5.6809E-04 -7.4646E-03 -8.9571E-04  1.5821E-04  1.3665E-03
 SE:             4.5588E-02  3.6189E-02  6.7366E-02  9.9164E-03  7.4779E-03
 N:                      32          32          32          32          32

 P VAL.:         9.9006E-01  8.3658E-01  9.8939E-01  9.8727E-01  8.5501E-01

 ETASHRINKSD(%)  3.1935E+00  1.0667E+01  7.1176E+00  3.3811E+01  1.7203E+01
 ETASHRINKVR(%)  6.2850E+00  2.0195E+01  1.3729E+01  5.6190E+01  3.1446E+01
 EBVSHRINKSD(%)  4.3651E+00  1.1164E+01  7.9196E+00  3.5032E+01  1.8534E+01
 EBVSHRINKVR(%)  8.5397E+00  2.1083E+01  1.5212E+01  5.7792E+01  3.3633E+01
 EPSSHRINKSD(%)  1.2654E+01
 EPSSHRINKVR(%)  2.3708E+01


 TOTAL DATA POINTS NORMALLY DISTRIBUTED (N):          483
 N*LOG(2PI) CONSTANT TO OBJECTIVE FUNCTION:    887.69462307571382
 OBJECTIVE FUNCTION VALUE WITHOUT CONSTANT:    1418.9229044364815
 OBJECTIVE FUNCTION VALUE WITH CONSTANT:       2306.6175275121955
 REPORTED OBJECTIVE FUNCTION DOES NOT CONTAIN CONSTANT

 TOTAL EFFECTIVE ETAS (NIND*NETA):                           160


 #TERE:
 Elapsed estimation  time in seconds:   394.05
 Elapsed covariance  time in seconds:   110.97
 Elapsed postprocess time in seconds:     0.38

 ********************               FIRST ORDER CONDITIONAL ESTIMATION WITH INTERACTION              ********************
 #OBJT:**************                       MINIMUM VALUE OF OBJECTIVE FUNCTION                      ********************
 #OBJV:********************************************     1418.923       **************************************************

 ********************               FIRST ORDER CONDITIONAL ESTIMATION WITH INTERACTION              ********************
 ********************                             FINAL PARAMETER ESTIMATE                           ********************

 THETA - VECTOR OF FIXED EFFECTS PARAMETERS   *********
         TH 1      TH 2      TH 3      TH 4      TH 5      TH 6      TH 7      TH 8      TH 9      TH10      TH11
         6.24E-07 -3.57E-06 -1.99E+00  2.05E+00  1.61E-01  5.71E-01  9.98E+00  1.31E-01 -2.96E+00  4.57E+00  3.59E+00

 OMEGA - COV MATRIX FOR RANDOM EFFECTS - ETAS  ********
         ETA1      ETA2      ETA3      ETA4      ETA5
 ETA1
+        7.33E-02
 ETA2
+        0.00E+00  5.42E-02
 ETA3
+        0.00E+00  0.00E+00  1.74E-01
 ETA4
+        0.00E+00  0.00E+00  0.00E+00  7.41E-03
 ETA5
+        0.00E+00  0.00E+00  0.00E+00  0.00E+00  2.69E-03

 SIGMA - COV MATRIX FOR RANDOM EFFECTS - EPSILONS  ****
         EPS1
 EPS1
+        1.00E+00

 OMEGA - CORR MATRIX FOR RANDOM EFFECTS - ETAS  *******
         ETA1      ETA2      ETA3      ETA4      ETA5
 ETA1
+        2.71E-01
 ETA2
+        0.00E+00  2.33E-01
 ETA3
+        0.00E+00  0.00E+00  4.17E-01
 ETA4
+        0.00E+00  0.00E+00  0.00E+00  8.61E-02
 ETA5
+        0.00E+00  0.00E+00  0.00E+00  0.00E+00  5.19E-02

 SIGMA - CORR MATRIX FOR RANDOM EFFECTS - EPSILONS  ***
         EPS1
 EPS1
+        1.00E+00

 ********************               FIRST ORDER CONDITIONAL ESTIMATION WITH INTERACTION              ********************
 ********************                            STANDARD ERROR OF ESTIMATE                          ********************

 THETA - VECTOR OF FIXED EFFECTS PARAMETERS   *********
         TH 1      TH 2      TH 3      TH 4      TH 5      TH 6      TH 7      TH 8      TH 9      TH10      TH11
         9.05E-05  1.53E-04  6.39E-02  2.66E+00  4.96E+00  1.61E+00  2.83E+01  4.11E-01  1.30E+00  2.16E-01  6.50E-01

 OMEGA - COV MATRIX FOR RANDOM EFFECTS - ETAS  ********
         ETA1      ETA2      ETA3      ETA4      ETA5
 ETA1
+        2.56E-01
 ETA2
+       .........  7.96E-01
 ETA3
+       ......... .........  8.22E-02
 ETA4
+       ......... ......... .........  1.49E-01
 ETA5
+       ......... ......... ......... .........  4.28E-03

 SIGMA - COV MATRIX FOR RANDOM EFFECTS - EPSILONS  ****
         EPS1
 EPS1
+       .........

 OMEGA - CORR MATRIX FOR RANDOM EFFECTS - ETAS  *******
         ETA1      ETA2      ETA3      ETA4      ETA5
 ETA1
+        4.73E-01
 ETA2
+       .........  1.71E+00
 ETA3
+       ......... .........  9.86E-02
 ETA4
+       ......... ......... .........  8.65E-01
 ETA5
+       ......... ......... ......... .........  4.13E-02

 SIGMA - CORR MATRIX FOR RANDOM EFFECTS - EPSILONS  ***
         EPS1
 EPS1
+       .........
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 Elapsed finaloutput time in seconds:     0.19
 #CPUT: Total CPU Time in Seconds,      504.363
